# -*- coding: utf-8 -*-
from stlib.scene import MainHeader, ContactHeader
from stlib.physics.rigid import Floor, Cube
from gripper import Gripper

def createScene(rootNode):
    """This is my first scene"""
    MainHeader(rootNode, gravity=[0.0, -981.0, 0.0], plugins=["SoftRobots"])
    ContactHeader(rootNode, alarmDistance=4, contactDistance=3, frictionCoef=0.08)

    Gripper(rootNode)

    Floor(rootNode,
          color=[1.0,0.0,0.0],
          translation=[0.0,-160.0,0.0],
          isAStaticObject=True)

    Cube(rootNode,
          uniformScale=20.0,
          color=[1.0,1.0,0.0],
          totalMass=0.03,
          volume=20,
          inertiaMatrix=[1000.0,0.0,0.0,0.0,1000.0,0.0,0.0,0.0,1000.0],
          translation=[0.0,-130.0,10.0])

    rosConnector = rootNode.createObject("SoftRobotsROSConnector", rosMasterURI="http://localhost:11311")

    return rootNode
